*Heading
** Job name: Input_test Model name: test_model-1
** Generated by: Abaqus/CAE 2019
** ----------------------------------------------------------------
**
** PARTS
*Part, name=Wall
**
*Include, Input=C:/Users/xucha/Desktop/gmsh-4.10.5-Windows64/gmsh-4.10.5-Windows64/STLFiles\wall.inp
*Elset, elset=Wall-Set-1, generate
   1,  400,    1
** Section: Wall-Section-1
*Solid Section, elset=Wall-Set-1, material=WALL
,
*End Part
**
*Part, name = Merged_Bar
**
*Include, Input = C:/Users/xucha/Desktop\merged_test_full.inp
*Elset, elset=VOLUME1, generate
    1,  1352,     1
*Elset, elset=MB-Set1, generate
    1,  1352,     1
** Section: MB-Section-1
*Solid Section, elset=MB-Set1, material=BAR
,
*End Part
**

**
** ASSEMBLY
**
*Assembly, name=Assembly
**
*Instance, name=MERGED_BAR-1, part=MERGED_BAR
*End Instance
**
*Instance, name=WALL-1, part=WALL
*End Instance
**
*Nset, nset=BC-Set1, instance=WALL-1, generate
   1,  882,    1
*Nset, nset=Vel-Set-1, instance=MERGED_BAR-1, generate
   1,  363,    1
*Elset, elset=_first_Surf-1_S1, internal, instance=MERGED_BAR-1
    9,   10,   26,   27,   38,   39
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*Elset, elset=_first_Surf-1_S2, internal, instance=MERGED_BAR-1
   73,   87,  112,  113,  114,  115
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*Elset, elset=_first_Surf-1_S3, internal, instance=MERGED_BAR-1
   87,  121,  127,  128,  129,  131
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*Elset, elset=_first_Surf-1_S4, internal, instance=MERGED_BAR-1
   35,   74,   87,  110,  111,  123
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*Surface, type=ELEMENT, name=first_Surf-1
_first_Surf-1_S1, S1
_first_Surf-1_S2, S2
_first_Surf-1_S4, S4
_first_Surf-1_S3, S3
*Elset, elset=_second_Surf-1_S1, internal, instance=WALL-1, generate
 381,  400,    1
*Elset, elset=_second_Surf-1_S2, internal, instance=WALL-1, generate
  1,  20,   1
*Elset, elset=_second_Surf-1_S3, internal, instance=WALL-1, generate
   1,  400,    1
*Elset, elset=_second_Surf-1_S4, internal, instance=WALL-1, generate
  20,  400,   20
*Elset, elset=_second_Surf-1_S5, internal, instance=WALL-1, generate
   1,  400,    1
*Elset, elset=_second_Surf-1_S6, internal, instance=WALL-1, generate
   1,  381,   20
*Surface, type=ELEMENT, name=second_Surf-1
_second_Surf-1_S1, S1
_second_Surf-1_S2, S2
_second_Surf-1_S4, S4
_second_Surf-1_S6, S6
_second_Surf-1_S3, S3
_second_Surf-1_S5, S5
*End Assembly
**
**
** MATERIALS
**
*Material, name=BAR
*Density
 8.968e-09,
*Elastic
124000., 0.34
*Material, name=WALL
*Density
 8.968e-09,
*Elastic
210000., 0.3
**
** INTERACTION PROPERTIES
**
*Surface Interaction, name=IntProp-1
*Friction
0.,
*Surface Behavior, pressure-overclosure=HARD
**
** BOUNDARY CONDITIONS
**
** Name: BC-1 Type: Displacement/Rotation
*Boundary
BC-Set1, 1, 1
BC-Set1, 2, 2
BC-Set1, 3, 3
BC-Set1, 4, 4
BC-Set1, 5, 5
BC-Set1, 6, 6
**
** PREDEFINED FIELDS
**
** Name: Velocity   Type: Velocity
*Initial Conditions, type=VELOCITY
Vel-Set-1, 1, 0.
Vel-Set-1, 2, 0.
Vel-Set-1, 3, -500000.
** ----------------------------------------------------------------
**
** STEP: Step-1
**
*Step, name=Step-1, nlgeom=YES
*Dynamic, Explicit
, 0.0001
*Bulk Viscosity
0.06, 1.2
**
** INTERACTIONS
**
** Interaction: Int-1
*Contact Pair, interaction=IntProp-1, mechanical constraint=KINEMATIC, cpset=Int-1
first_Surf-1, second_Surf-1
**
** OUTPUT REQUESTS
**
*Restart, write, number interval=1, time marks=NO
**
** FIELD OUTPUT: F-Output-1
**
*Output, field, variable=PRESELECT
**
** HISTORY OUTPUT: H-Output-1
**
*Output, history, variable=PRESELECT
*End Step
